// COMSOL Multiphysics 6.4.0.429 model "Planar Mosfet.mph"
// Outline of the model tree

Parameters
  Vd = 10[mV]  // Drain Voltage
  Vg = 2[V]  // Gate Voltage

Geometry
  geom1 "Geometry 1" (2D, length unit µm)
    r1: Rectangle "Mosfet" | size = {3, 0.7}
    pol1: Polygon
      type = closed
      source = table
      table = {{0, 0.67}, {0, 0.7}, {0.5, 0.7}, {0.7, 0.7}, {2.3, 0.7}, {2.5, 0.7}, {3, 0.7}, {3, 0.67}}
    fin: Finalize "Form Union"
    mce1: MeshControlEdges | input = fin(1) boundaries 4

Materials
  mat1: Common "Si - Silicon" on all domains
    def: def "Basic"
      relpermittivity = 11.7
      thermalconductivity = 131[W/(m*K)]
      density = 2329[kg/m^3]
      heatcapacity = 700[J/(kg*K)]
    AroraMobilityModel: AroraMobilityModel
      mun0_ref_arora = 1252[cm^2/(V*s)]
      mup0_ref_arora = 407[cm^2/(V*s)]
      mun_min_ref_arora = 88[cm^2/(V*s)]
      mup_min_ref_arora = 54.3[cm^2/(V*s)]
      Nn0_ref_arora = 1.26e17[1/cm^3]
      Np0_ref_arora = 2.35e17[1/cm^3]
      alpha0_arora = 0.88
      beta1_arora = -0.57
      beta2_arora = -2.33
      beta3_arora = -2.33
      beta4_arora = -0.146
      Tref_arora = 300[K]
    PowerLawMobilityModel: PowerLawMobilityModel
      mun0_pl = 1448[cm^2/(V*s)]
      mup0_pl = 473[cm^2/(V*s)]
      alphan_pl = 2.33
      alphap_pl = 2.23
      Tref_pl = 300[K]
    Auger: Auger "Auger recombination"
      Cn = 2.8e-31[cm^6/s]
      Cp = 9.9e-32[cm^6/s]
    Direct: Direct "Direct recombination"
      C = 0[cm^3/s]
    SRH: SRH "Shockley–Read–Hall recombination"
      taun = 10[us]
      taup = 10[us]
    FletcherMobilityModel: FletcherMobilityModel
      F1_fl = 1.04e21[1/(cm^1*V*s)]
      F2_fl = 7.45e13[1/cm^2]
      Tref_fl = 300[K]
    CaugheyThomasMobilityModel: CaugheyThomasMobilityModel
      alphan0_ct = 1.11
      alphap0_ct = 1.21
      vn0_ct = 1e7[cm/s]
      vp0_ct = 8.37e6[cm/s]
      betan1_ct = 0.66
      betap1_ct = 0.17
      betan2_ct = -0.87
      betap2_ct = -0.52
      Tref_ct = 300[K]
    SemicondMaterial: SemicondMaterial "Semiconductor material"
      Eg0 = 1.12[V]
      chi0 = 4.05[V]
      Nv = (T/300[K])^(3/2)*1.04e19[1/cm^3]
      Nc = (T/300[K])^(3/2)*2.8e19[1/cm^3]
      mun = 1450[cm^2/(V*s)]
      mup = 500[cm^2/(V*s)]
    LombardiSurfaceMobilityModel: LombardiSurfaceMobilityModel
      deltan_ls = 5.82e14[V/s]
      deltap_ls = 2.05e14[V/s]
      mun1_ls = 4.75e7[cm^2/(V*s)]
      mup1_ls = 9.93e7[cm^2/(V*s)]
      mun2_ls = 1.74e5[cm^2/(V*s)]
      mup2_ls = 8.84e5[cm^2/(V*s)]
      alphan_ls = 0.125
      alphap_ls = 0.0317
      Tref_ls = 1[K]
      Eref_ls = 1[V/cm]
      Nref_ls = 1[1/cm^3]
    ImpactIonization: ImpactIonization
      an = 0.426[1/V]
      ap = 0.243[1/V]
      bn = 4.81E5[V/cm]
      bp = 6.53E5[V/cm]
      cnii = 3.05E-4[1/K]
      cpii = 5.35E-4[1/K]
      dn = 6.86E-4[1/K]
      dp = 5.67E-4[1/K]
    SlotboomModel: SlotboomModel
      Eref_sb = 0.00692[V]
      Nref_sb = 1.3e17[1/cm^3]
      alpha_sb = 0.5
    JainRoulstonModel: JainRoulstonModel
      An_jr = 3.5e-8[V]
      Bn_jr = 0[V]
      Cn_jr = 0[V]
      Ap_jr = 3.5e-8[V]
      Bp_jr = 0[V]
      Cp_jr = 0[V]
      Nref_jr = 1[1/cm^3]
      alpha_jr = 0.5
    KlaassenUnifiedMobilityModel: KlaassenUnifiedMobilityModel
      T_ref_kl = 300[K]
      mu_e_max_kl = 1414.0[cm^2/V/s]
      mu_h_max_kl = 470.5[cm^2/V/s]
      mu_e_min_kl = 68.5[cm^2/V/s]
      mu_h_min_kl = 44.9[cm^2/V/s]
      theta_e_kl = 2.285
      theta_h_kl = 2.247
      alpha_e_1_kl = 0.711
      alpha_h_1_kl = 0.719
      N_ref_e_1_kl = 9.20e16[cm^-3]
      N_ref_h_1_kl = 2.23e17[cm^-3]
      c_D_kl = 0.21
      c_A_kl = 0.50
      N_ref_D_kl = 4.0e20[cm^-3]
      N_ref_A_kl = 7.2e20[cm^-3]
      f_BH_kl = 3.828
      f_CW_kl = 2.459
      N_BH_kl = 1.36e20[cm^-3]
      P_CW_kl = 3.97e13
      s_1_kl = 0.89233
      s_2_kl = 0.41372
      s_3_kl = 0.19778
      s_4_kl = 0.28227
      s_5_kl = 0.005978
      s_6_kl = 1.80618
      s_7_kl = 0.72169
      r_1_kl = 0.7643
      r_2_kl = 2.2999
      r_3_kl = 6.5502
      r_4_kl = 2.3670
      r_5_kl = -0.01552
      r_6_kl = 0.6478
      m_e_kl = me_const
      m_h_kl = 1.258*me_const
  mat2: Common "SiC - Silicon Carbide [solid,4H Polytype]" (disabled) on no domains | orientation = 4H Polytype
    def: def "Basic"
      soundspeed = 0.877e6[cm/s]
      relpermittivity = diag{9.76, 9.76, 9.98}
      thermalconductivity = diag{kappa(T,b0_a), kappa(T,b0_a), kappa(T,b0_c)}
      density = 2329[kg/m^3]
      heatcapacity = Cp_debye/rho
      b0_a = 3.74[W/(cm*K)]
      DESCR_PREFIX:b0_a = Thermal conductivity, b0 coefficient, perpenducalr to c-axis
      b0_c = 2.62[W/(cm*K)]
      DESCR_PREFIX:b0_c = Thermal conductivity, b0 coefficient, parallel to c-axis
      Cp_debye = 12*pi*(k_B_const*T/(h_const*c))^3*k_B_const*(Cp_debye_int_prim(T_debye/T)-Cp_debye_int_prim(0))
      DESCR_PREFIX:Cp_debye = Cp per volume, Debye approximation
      T_debye = 1200[K]
      DESCR_PREFIX:T_debye = Debye temperature
      an1: Analytic "Thermal conductivity" | funcname = kappa; expr = b0*(T/300)^(-1.49); args = {T, b0}; argunit = {K, W/(cm*K)}
      int1: Interpolation "Integral for Debye Approximation"
        funcnametable = {int1, 1}
        funcname = Cp_debye_int
        table = 
          {1.00E-04, 1.00E-08}
          {2.00E-04, 4.00E-08}
          {5.00E-04, 2.50E-07}
          {1.00E-03, 1.00E-06}
          {2.00E-03, 4.00E-06}
          {5.00E-03, 2.50E-05}
          {1.00E-02, 1.00E-04}
          {2.00E-02, 4.00E-04}
          {5.00E-02, 2.50E-03}
          {1.00E-01, 9.99E-03}
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        plotfuncname = Cp_debye_int
        defineprimfun = on
    AroraMobilityModel: AroraMobilityModel
      mun0_ref_arora = 1141[cm^2/(V*s)]
      mup0_ref_arora = 124[cm^2/(V*s)]
      mun_min_ref_arora = 0[cm^2/(V*s)]
      mup_min_ref_arora = 15.9[cm^2/(V*s)]
      Nn0_ref_arora = 1.94e17[1/cm^3]
      Np0_ref_arora = 1.76e19[1/cm^3]
      alpha0_arora = 0.61
      beta1_arora = 0
      beta2_arora = -2.15
      beta3_arora = 0
      beta4_arora = 0
      Tref_arora = 300[K]
    Auger: Auger "Auger recombination"
      Cn = 5e-31[cm^6/s]
      Cp = 5e-31[cm^6/s]
      y30 = 7e-31[cm^6/s]
      DESCR_PREFIX:y30 = Temperature dependent coefficient
      E0 = 0.45[eV]
      DESCR_PREFIX:E0 = Exponential coefficient
    Direct: Direct "Direct recombination"
      C = 0[cm^3/s]
    SRH: SRH "Shockley–Read–Hall recombination"
      taun = 1[us]
      taup = 1[us]
    CaugheyThomasMobilityModel: CaugheyThomasMobilityModel
      alphan0_ct = 2
      alphap0_ct = 2
      vn0_ct = 2e7[cm/s]
      vp0_ct = 2e7[cm/s]
      betan1_ct = 0
      betap1_ct = 0
      betan2_ct = 0
      betap2_ct = 0
      Tref_ct = 300[K]
    SemicondMaterial: SemicondMaterial "Semiconductor material"
      Eg0 = 3.26[V]
      chi0 = 3.1[V]
      Nv = (T/300[K])^(3/2)*Nv0
      Nc = (T/300[K])^(3/2)*Nc0
      mun = 1141[cm^2/(V*s)]
      mup = 140[cm^2/(V*s)]
      mde = 0.76[1]
      DESCR_PREFIX:mde = Relative effective mass of electrons in the conduction band
      mdh = 1.20[1]
      DESCR_PREFIX:mdh = Relative effective mass of holes in the valence band
      Nc0 = 2.509e19*mde^(3/2)[1/cm^3]
      DESCR_PREFIX:Nc0 = Reference density of states in the conduction band
      Nv0 = 2.509e19*mdh^(3/2)[1/cm^3]
      DESCR_PREFIX:Nv0 = Reference density of states in the valence band
    ImpactIonization: ImpactIonization
      an = a_n
      ap = a_p
      bn = b_n
      bp = b_p
      cnii = 0[1/K]
      cpii = 0[1/K]
      dn = 0[1/K]
      dp = 0[1/K]
      eps_i_e = 10[eV]
      DESCR_PREFIX:eps_i_e = Electron coefficient
      eps_r = 0.12[eV]
      DESCR_PREFIX:eps_r = Common coefficient
      lambda_e = 29.9[Å]
      DESCR_PREFIX:lambda_e = Length coefficient, electrons
      eps_i_h = 7[eV]
      DESCR_PREFIX:eps_i_h = Hole coefficient
      lambda_h = 32.5[Å]
      DESCR_PREFIX:lambda_h = Length coefficient, holes
      a_n = e_const/eps_i_e
      DESCR_PREFIX:a_n = an coefficient
      b_n = sqrt(3*eps_i_e*eps_r)/(e_const*lambda_e)
      DESCR_PREFIX:b_n = bn coefficient
      a_p = e_const/eps_i_h
      DESCR_PREFIX:a_p = an coefficient
      b_p = sqrt(3*eps_i_h*eps_r)/(e_const*lambda_h)
      DESCR_PREFIX:b_p = bn coefficient

Physics
  semi: Semiconductor on all domains
    dependent variable V
    ModelProperties.CarrierStatistics = FermiDirac
    smm1: SemiconductorMaterialModel (default) | BandGapNarrowing = jain; Ionization = complete
    ins1: Insulation (default)
    zc1: ZeroCharge (default)
    ii1: InsulatorInterface (default)
    cont1: Continuity "Continuity/Heterojunction 1" (default)
    init1: init "Initial Values 1" (default)
    adm1: AnalyticDopingModel on all domains | NAc = 1e17[1/cm^3]
    adm2: AnalyticDopingModel on all domains
      impurityDistribution = box
      impurityType = donor
      NDc = 1e20[1/cm^3]
      rb = {0[um], 0.6[um], 0}
      jda = {0.2[um], 0.25[um], 0}
      AsymmetricJunctionDepth = 1
      jwidth = 0.6[um]
      jdepth = 0.1[um]
      Nb_src = root.comp1.semi.adm1.NAc
    adm3: AnalyticDopingModel on all domains
      impurityDistribution = box
      impurityType = donor
      NDc = 1e20[1/cm^3]
      rb = {2.4[um], 0.6[um], 0}
      jda = {0.2[um], 0.25[um], 0}
      AsymmetricJunctionDepth = 1
      jwidth = 0.6[um]
      jdepth = 0.1[um]
      Nb_src = root.comp1.semi.adm1.NAc
    mc1: MetalContact "Source" on boundaries 3
    mc2: MetalContact "Drain" on boundaries 7 | V0 = Vd
    mc3: MetalContact "Base" on boundaries 2
    gc1: GateContact "Gate Oxide" on boundaries 5 | V0 = Vg; epsilon_ins = 4.5; d_ins = 30[nm]
    tar1: TrapAssistedRecombination on all domains
  ht: HeatTransfer "Heat Transfer in Solids" (disabled) on all domains
    dependent variable T
    PhysicalModelProperty.dz = 1e-6[m]
    solid1: SolidHeatTransferModel "Solid 1" (default)
    init1: init "Initial Values 1" (default)
    ins1: ThermalInsulation (default)
    hf1: HeatFluxBoundary "Heat Flux 1" on boundaries 2, 3, 5, 7 | HeatFluxType = ConvectiveHeatFlux; h = 2E8
    hs1: HeatSource on all domains | Q0_src = root.comp1.semi.Q_tot

Mesh
  mesh1 "Mesh 1"
    size: MeshSizeDefault | hmax = 1.05; custom = on
    edg1: Edge on boundaries 3-7 | smoothcontrol = off
      size1: Size on boundaries 3-7 | table = semi; hmax = 0.03; custom = on
    map1: Map "Mapped 1" on domains 2 | adjustedgdistr = on; smoothcontrol = off
      dis1: Distribution on boundaries 9
        type = predefined
        reverse = on
        elemcount = 8
        elemratio = 9
        growthrate = exponential
    ftri1: FreeTri "Free Triangular 1" on remaining entities | smoothcontrol = off

Studies
  std1 "Study 1"
    stat: Stationary
      useparam = on
      sweeptype = filled
      pname = {Vd, Vg}
      plistarr = {0.01, range(0,0.2,1.4) 2 3 4}
      punit = {V, V}
  std2 "Study 2"
    stat: Stationary
      useinitsol = on
      initmethod = sol
      initstudy = std1
      useparam = on
      sweeptype = filled
      pname = {Vg, Vd}
      plistarr = {range(1,1,4), range(0,0.25,1.5) 2 3 4 5}
      punit = {V, V}
      preusesol = auto
  std3 "Study 3"
    stat: Stationary (disabled)
      useinitsol = on
      initmethod = sol
      initstudy = std2
      initsol = sol2
      useparam = on
      sweeptype = filled
      pname = {Vg, Vd}
      plistarr = {range(2,1,4), range(0,0.25,1.5) 2 3 4}
      punit = {V, V}

Solver configurations
  sol1 "Solution 1" (study std1)
    v1: Variables "Dependent Variables 1"
    s1: Stationary "Stationary Solver 1"
      p1: Parametric
      fc1: FullyCoupled
      d1: Direct
  sol2 "Solution 2" (study std2)
    // same settings as sol1
  sol3 "Solution 3" (study std3)

Datasets
  dset1: Solution | solution = sol1
  dset2: Solution | solution = sol2
  dset3: Solution | solution = sol3
  cln1: CutLine2D | data = dset2; genpoints = {{0, 0.65}, {3, 0.65}}

Plots
  pg2: PlotGroup1D "Id vs Vg" | data = dset1
    glob1: Global | expr = semi.I0_2; unit = uA; descr = Terminal current
  pg8: PlotGroup1D "Vd vs Id" | data = dset2
    glob1: Global | expr = semi.I0_2; unit = uA; descr = Terminal current
  pg1: PlotGroup2D "Dopant Concentration" | data = dset1
    surf1: Surface | expr = semi.Nd-semi.Na; unit = 1/cm^3
  pg4: PlotGroup2D "Electron Concentration (semi)" | data = dset2
    surf1: Surface | expr = semi.N; unit = 1/cm^3
  pg5: PlotGroup2D "Hole Concentration (semi)" | data = dset2
    surf1: Surface | expr = semi.P; unit = 1/cm^3
  pg6: PlotGroup2D "Electric Potential (semi)" | data = dset2
    surf1: Surface | expr = V
  pg7: PlotGroup2D "Net Dopant Concentration (semi)"
    data = dset2
    title = Net Dopant Concentration \vert N<sub>d</sub> - N<sub>a</sub>\vert: P-type (Red), N-type (Blue)
    surf2: Surface "P-Type" | expr = semi.Nnetdop; unit = 1/cm^3
      filt1: Filter | expr = semi.Na-semi.Nd > 1[1/cm^3]; useder = on
    surf1: Surface "N-Type" | expr = semi.Nnetdop; unit = 1/cm^3
      filt1: Filter | expr = semi.Nd-semi.Na > 1[1/cm^3]; useder = on
  pg14: PlotGroup2D "Electron Current Direction" | data = dset2
    surf1: Surface | data = dset2; expr = semi.normJn; unit = A/cm^2; descr = Electron current density norm
    arws1: ArrowSurface
      expr = {semi.JnX, semi.JnY}
      descr = Electron current density
      xnumber = 100
      ynumber = 100
      arrowlength = logarithmic
    arws2: ArrowSurface (disabled)
      expr = {semi.Jn_diffX, semi.Jn_diffY}
      descr = Electron diffusion current density
      xnumber = 40
      ynumber = 40
      arrowlength = logarithmic
    arws3: ArrowSurface (disabled)
      expr = {semi.Jn_driftX, semi.Jn_driftY}
      descr = Electron drift current density
      xnumber = 100
      ynumber = 100
      arrowlength = logarithmic
    arws4: ArrowSurface (disabled)
      expr = {semi.JX, semi.JY}
      descr = Total current density, nodal value
      xnumber = 50
      ynumber = 50
      arrowlength = logarithmic
  pg15: PlotGroup2D "E vs Distance - 2D" | data = dset2
    surf1: Surface | data = dset2; expr = semi.normE; unit = V/cm; descr = Electric field norm
    arws1: ArrowSurface (disabled)
      expr = {semi.EX, semi.EY}
      descr = Electric field
      xnumber = 50
      ynumber = 50
      arrowlength = logarithmic
  pg16: PlotGroup1D "E vs distance" | data = cln1
    lngr1: LineGraph | data = cln1; expr = semi.normE; unit = V/cm; descr = Electric field norm
    lngr2: LineGraph | data = cln1; expr = semi.normE; unit = V/cm; descr = Electric field norm
    lngr3: LineGraph "All Combinations" (disabled)
      data = cln1
      expr = semi.normE
      unit = V/cm
      descr = Electric field norm
  pg17: PlotGroup1D "Id vs Vg 1 - Study2" | data = dset2
    glob1: Global | expr = semi.I0_2; unit = uA; descr = Terminal current